# Фокусировка пучков заряженных частиц. Движение пучка в системе тонких линз
# 3. Система OFODO
# Фокусное расстояние фокусирующей линзы, м
Ffok := 4
# Фокусное расстояние дефокусирующей линзы, м
Fdef := 5
# Матрицы пролётного промежутка и линз
Mf := [1, 0; -1/Ffok, 1]
Md := [1, 0; 1/Fdef, 1]
L(z) := [1, z; 0, 1]
# Расстояние между линзами, м
d := 6
# Пролетный промежуток до фокусирующей линзы, м
s1 := 6
# Пролетный промежуток после дефокусирующей линзы, м
s2 := 4
# Начальные условия
xmax := 0.01  # м
dxmax := 0.001  # рад
i := 0 .. 100
[x[i]; dx[i]] := [xmax*cos(i*2*π/100); dxmax*sin(i*2*π/100)]
[x0[i]; dx0[i]] := L(s1)*[x[i]; dx[i]]
[x1[i]; dx1[i]] := Mf*[x0[i]; dx0[i]]
[x2[i]; dx2[i]] := L(d)*[x1[i]; dx1[i]]
[x3[i]; dx3[i]] := Md*[x2[i]; dx2[i]]
[x4[i]; dx4[i]] := L(s2)*[x3[i]; dx3[i]]
# Матрица да
# [plot: dx, dx0 vs x, x0]
# [plot: dx vs x]
# [plot: dx, dx0, dx1 vs x, x0, x1]
# [plot: dx, dx0, dx1, dx2 vs x, x0, x1, x2]
# [plot: dx, dx0, dx1, dx2, dx3 vs x, x0, x1, x2, x3]
# [plot: dx, dx0, dx1, dx2, dx3, dx4 vs x, x0, x1, x2, x3, x4]
